kJ := 10^3 J
# Energy Per Kilogram Released During Combustion
M_Water := 18.01528 gm/mol
BE_H2 := 436 kJ/mol
BE_O2 := 498 kJ/mol
BE_OH := 428 kJ/mol
BE_OHH := 498.7 kJ/mol
E_kg := ((BE_OH + BE_OHH) - (BE_H2 + BE_O2/2))/M_Water = 13416389 J/kg
# Maximum Chemical Performance
η := 0.9
g_0 := 9.81 m/s^2
c := sqrt(2*η*E_kg) = 4914.21 m/s
I_sp := c/g_0 = 500.939 s
